*Heading
** Job name: cohesive Model name: Model-1
** Generated by: Abaqus/CAE 2020
*Preprint, echo=NO, model=NO, history=NO, contact=NO
**
** PARTS
**
*Part, name=steel
*Node
      1, 0.00100000005, 0.000250000012
      2,           0., 0.000250000012
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*Element, type=CPS4R
  1,   1,   7,  80,  52
  2,   7,   8,  81,  80
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*Element, type=COH2D4
201, 232, 251,   2,  25
202, 233, 232,  25,  24
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*Nset, nset=Set-5, generate
   1,  252,    1
*Elset, elset=Set-5, generate
   1,  200,    1
*Elset, elset=CohesiveSeam-1-Elements, generate
 201,  220,    1
*Nset, nset=CohesiveSeam-1-TopNodes
  1,  2,  7,  8,  9, 10
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*Nset, nset=CohesiveSeam-1-BottomNodes, generate
 232,  252,    1
*Elset, elset=__PickedSurf5_S3, internal, generate
 201,  220,    1
*Surface, type=ELEMENT, name=_PickedSurf5, internal
__PickedSurf5_S3, S3
*Elset, elset=_CohesiveSeam-1-TopSurf_S3, internal, generate
 201,  220,    1
*Surface, type=ELEMENT, name=CohesiveSeam-1-TopSurf
_CohesiveSeam-1-TopSurf_S3, S3
*Elset, elset=_CohesiveSeam-1-BottomSurf_S1, internal, generate
 201,  220,    1
*Surface, type=ELEMENT, name=CohesiveSeam-1-BottomSurf
_CohesiveSeam-1-BottomSurf_S1, S1
** Section: steel
*Solid Section, elset=Set-5, material=steel
,
** Section: cohesive
*Cohesive Section, elset=CohesiveSeam-1-Elements, material=cohesive, response=TRACTION SEPARATION, thickness=SPECIFIED
1.,
*End Part
**
**
** ASSEMBLY
**
*Assembly, name=Assembly
**
*Instance, name=steel-1, part=steel
*End Instance
**
*Nset, nset=Set-1, instance=steel-1
  3,  4, 30, 31, 32, 33
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*Elset, elset=Set-1, instance=steel-1, generate
  81,  100,    1
*Nset, nset=Set-2, instance=steel-1
  5,  6, 57, 58, 59, 60
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*Elset, elset=Set-2, instance=steel-1, generate
 181,  200,    1
*End Assembly
**
** MATERIALS
**
*Material, name=cohesive
*Damage Initiation, criterion=MAXS
100.,100.,100.
*Damage Evolution, type=ENERGY
 0.0005,
*Damage Stabilization
0.0001
*Elastic, type=TRACTION
 2e+08, 2e+08, 2e+08
*Material, name=steel
*Elastic
200000.,0.
**
** BOUNDARY CONDITIONS
**
** Name: BC-1 Type: 位移/转角
*Boundary
Set-1, 2, 2
** ----------------------------------------------------------------
**
** STEP: Step-1
**
*Step, name=Step-1, nlgeom=YES, inc=1000
*Static
0.01, 1., 1e-10, 1.
**
** BOUNDARY CONDITIONS
**
** Name: BC-2 Type: 位移/转角
*Boundary
Set-2, 2, 2, 1e-05
**
** OUTPUT REQUESTS
**
*Restart, write, frequency=0
**
** FIELD OUTPUT: F-Output-1
**
*Output, field
*Node Output
CF, RF, U
*Element Output, directions=YES
DMICRT, LE, PE, PEEQ, PEMAG, S, SDEG, STATUS
*Contact Output
CDISP, CSTRESS
**
** HISTORY OUTPUT: H-Output-1
**
*Output, history, variable=PRESELECT
*End Step
